# OpenSim document version 30501
Model:
  BodySet:
    Body ground: mass=0 [kg] mass_center=(0 0 0)
    Body humerus: mass=1 mass_center=(0 0 0) inertia=(0 0 0 0 0 0)
    Body radius: mass=1 mass_center=(0 0 0) inertia=(0 0 0 0 0 0)
  JointSet:
    PinJoint shoulder: location_in_parent=(0 2 0) location_in_child=(0 1 0) orientation_in_child=(0 0 0) [radians]
      connectors:
        Connector_Body_ parent_body: connected_to_name=ground
        Connector_Body_ child_body: connected_to_name=humerus
      Coordinate shoulder_coord_0: motion_type=rotational
    PinJoint elbow: location_in_parent=(0 0 0) location_in_child=(0 1 0) orientation_in_child=(0 0 0)
      connectors:
        Connector_Body_ parent_body: connected_to_name=humerus
        Connector_Body_ child_body: connected_to_name=radius
      Coordinate elbow_coord_0: motion_type=rotational
  ControllerSet:
    PrescribedController: actuator_list=biceps
      FunctionSet ControlFunctions:
        StepFunction: transition_start_time=0.5 transition_end_time=3 start_value=0.3 end_value=1
  ForceSet:
    Millard2012EquilibriumMuscle biceps: min_control=0 max_control=1 max_isometric_force=200 optimal_fiber_length=0.6
        tendon_slack_length=0.55 pennation_angle_at_optimal=0 [radians] minimum_activation=0.01
      PathPoint point1: humerus (0 0.8 0)
      PathPoint point2: radius (0 0.7 0)
      ActiveForceLengthCurve: minimum_value=0
      ForceVelocityCurve: concentric_slope_at_vmax=0 concentric_slope_near_vmax=0.25 isometric_slope=5
          eccentric_slope_at_vmax=0 eccentric_slope_near_vmax=0.15 max_eccentric_velocity_force_multiplier=1.4
      FiberForceLengthCurve
      TendonForceLengthCurve
